New "Load.MT_65146_M1" bus1="651461.1.2.3.4" phases=3 conn=Delta model=2 kv=23.100000000 kw = 14.5843055 pf=0.92 status=variable vmaxpu=1.5 vminpu=0.6 daily="MT6_SA"
New "Load.MT_65146_M2" bus1="651461.1.2.3.4" phases=3 conn=Delta model=3 kv=23.100000000 kw = 14.5843055 pf=0.92 status=variable vmaxpu=1.5 vminpu=0.6 daily="MT6_SA"
New "Load.MT_20050_M1" bus1="200501.1.2.3.4" phases=3 conn=Delta model=2 kv=23.100000000 kw = 54.2936395 pf=0.92 status=variable vmaxpu=1.5 vminpu=0.6 daily="MT1_SA"
New "Load.MT_20050_M2" bus1="200501.1.2.3.4" phases=3 conn=Delta model=3 kv=23.100000000 kw = 54.2936395 pf=0.92 status=variable vmaxpu=1.5 vminpu=0.6 daily="MT1_SA"
New "Load.MT_62502_M1" bus1="625021.1.2.3.4" phases=3 conn=Delta model=2 kv=23.100000000 kw = 6.0938795 pf=0.92 status=variable vmaxpu=1.5 vminpu=0.6 daily="MT3_SA"
New "Load.MT_62502_M2" bus1="625021.1.2.3.4" phases=3 conn=Delta model=3 kv=23.100000000 kw = 6.0938795 pf=0.92 status=variable vmaxpu=1.5 vminpu=0.6 daily="MT3_SA"
New "Load.MT_32932_M1" bus1="329321.1.2.3.4" phases=3 conn=Delta model=2 kv=23.100000000 kw = 129.3808045 pf=0.92 status=variable vmaxpu=1.5 vminpu=0.6 daily="MT1_SA"
New "Load.MT_32932_M2" bus1="329321.1.2.3.4" phases=3 conn=Delta model=3 kv=23.100000000 kw = 129.3808045 pf=0.92 status=variable vmaxpu=1.5 vminpu=0.6 daily="MT1_SA"
New "Load.MT_77971_1_M1" bus1="779901.1.2.3.4" phases=3 conn=Delta model=2 kv=23.100000000 kw = 4.4895725 pf=0.92 status=variable vmaxpu=1.5 vminpu=0.6 daily="MT3_SA"
New "Load.MT_77971_1_M2" bus1="779901.1.2.3.4" phases=3 conn=Delta model=3 kv=23.100000000 kw = 4.4895725 pf=0.92 status=variable vmaxpu=1.5 vminpu=0.6 daily="MT3_SA"
New "Load.MT_77971_2_M1" bus1="779901.1.2.3.4" phases=3 conn=Delta model=2 kv=23.100000000 kw = 1.4425195 pf=0.92 status=variable vmaxpu=1.5 vminpu=0.6 daily="MT2_SA"
New "Load.MT_77971_2_M2" bus1="779901.1.2.3.4" phases=3 conn=Delta model=3 kv=23.100000000 kw = 1.4425195 pf=0.92 status=variable vmaxpu=1.5 vminpu=0.6 daily="MT2_SA"
